*HEADING
Truss test
*NODE
1, 0.0, 0.0, 0.0
2, 1.0, 0.0, 0.0
3, 2.0, 0.0, 0.0
4, 3.0, 0.0, 0.0
5, 4.0, 0.0, 0.0
6, 5.0, 0.0, 0.0
7, 6.0, 0.0, 0.0
8, 7.0, 0.0, 0.0
9, 8.0, 0.0, 0.0
10, 9.0, 0.0, 0.0
11, 10.0, 0.0, 0.0
*ELEMENT, TYPE=TRUSS2
1, 1, 2
2, 2, 3
3, 3, 4
4, 4, 5
5, 5, 6
6, 6, 7
7, 7, 8
8, 8, 9
9, 9, 10
10, 10, 11
*MATERIAL, NAME=STEEL
*ELASTIC
200000.0, 0.3
*STEP
*STATIC
*BOUNDARY
1, 1, 3, 0.0
*CLOAD
11, 2, 1000.0
*END STEP
